*Heading
** Job name: sg2_airfoil Model name: Model-1
** Generated by: Abaqus/CAE 2017
*Preprint, echo=NO, model=NO, history=NO, contact=NO
**
** PARTS
**
*Part, name=Part-1
*Node
      1, 0.0864999965, 0.0937073603
      2, 0.0864999965, -0.0666999891
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*Element, type=CPS3
 1,  992,  214,  991
 2,  213, 1029, 1254
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*Element, type=CPS4R
 24, 1289, 1290,  993,  994
 25,  994,  995, 1288, 1289
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*Nset, nset=Set-1
    1,    2,    3,    4,    5,    6
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*Elset, elset=Set-1, generate
 1301,  2253,     1
*Nset, nset=Set-2
   24,   25,   26,   27,   28,   29
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*Elset, elset=Set-2, generate
 2255,  2353,     1
*Nset, nset=Set-3
   23,   24,   25,   26,   27,   28
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*Elset, elset=Set-3, generate
 2254,  2354,     1
*Nset, nset=Set-4
  108,  109,  110,  111,  112,  113
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*Elset, elset=Set-4, generate
 2355,  6159,     1
*Nset, nset=Set-5
   881,   882,   883,   884,   885,   886
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*Elset, elset=Set-5, generate
  7112,  13298,      1
*Nset, nset=Set-6
  108,  109,  110,  111,  112,  113
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*Elset, elset=Set-6
    2,    6,    7,    8,   24,   25
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*Distribution, name=Ori-1-DiscOrient, location=ELEMENT, Table=Ori-1-DiscOrient_Table
** Description: Distribution generated from Discrete Orientation
,           1.,           0.,           0.,           0.,           1.,           0.
1, -0.0608316622674465, -0.998148024082184,           0., 0.998148024082184, -0.0608316622674465,           0.
2, 0.373893648386002, -0.927471578121185,           0., 0.927471578121185, 0.373893648386002,           0.
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492, 0.0310704968869686, 0.999517202377319,           0., -0.999517202377319, 0.0310704968869686,           0.
*Distribution, name=Ori-2-DiscOrient, location=ELEMENT, Table=Ori-2-DiscOrient_Table
** Description: Distribution generated from Discrete Orientation
,           1.,           0.,           0.,           0.,           1.,           0.
6464, -0.472438037395477, -0.881363868713379,           0., 0.881363868713379, -0.472438037395477,           0.
6465, 0.066882312297821, -0.997760891914368,           0., 0.997760891914368, 0.066882312297821,           0.
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7111, 0.200183302164078, -0.979758441448212,           0., 0.979758441448212, 0.200183302164078,           0.
*Distribution, name=Ori-3-DiscOrient, location=ELEMENT, Table=Ori-3-DiscOrient_Table
** Description: Distribution generated from Discrete Orientation
,           1.,           0.,           0.,           0.,           1.,           0.
1048, -0.836370587348938, 0.548164427280426,           0., -0.548164427280426, -0.836370587348938,           0.
1049, -0.840556204319, -0.541724324226379,           0., 0.541724324226379, -0.840556204319,           0.
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1300, -0.428315311670303, -0.90362936258316,           0., 0.90362936258316, -0.428315311670303,           0.
*Distribution, name=Ori-4-DiscOrient, location=ELEMENT, Table=Ori-4-DiscOrient_Table
** Description: Distribution generated from Discrete Orientation
,           1.,           0.,           0.,           0.,           1.,           0.
493,           0.,           1.,           0.,          -1.,           0.,           0.
494, 0.999982953071594, -0.00584228197112679,           0., 0.00584228197112679, 0.999982953071594,           0.
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1047,           0.,           1.,           0.,          -1.,           0.,           0.
*Distribution, name=Ori-5-DiscOrient, location=ELEMENT, Table=Ori-5-DiscOrient_Table
** Description: Distribution generated from Discrete Orientation
,           1.,           0.,           0.,           0.,           1.,           0.
6160, 0.767365336418152, -0.64121013879776,           0., 0.64121013879776, 0.767365336418152,           0.
6161, 0.989491760730743, 0.144589260220528,           0., -0.144589260220528, 0.989491760730743,           0.
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6463, -0.958356857299805, 0.285573303699493,           0., -0.285573303699493, -0.958356857299805,           0.
*Orientation, name=Ori-1, system=RECTANGULAR
Ori-1-DiscOrient
3, 0.
** Region: (CompositeLayup-1-1: Generated From Layup)
*Elset, elset=CompositeLayup-1-1, generate
   1,  492,    1
** Section: CompositeLayup-1-1
*Solid Section, elset=CompositeLayup-1-1, composite, orientation=Ori-1, stack direction=3, layup=CompositeLayup-1
1., 1, cfrp, 0., Ply-1
*Orientation, name=Ori-4, system=RECTANGULAR
Ori-4-DiscOrient
3, 0.
** Region: (CompositeLayup-4-1: Generated From Layup)
*Elset, elset=CompositeLayup-4-1, generate
  493,  1047,     1
** Section: CompositeLayup-4-1
*Solid Section, elset=CompositeLayup-4-1, composite, orientation=Ori-4, stack direction=3, layup=CompositeLayup-4
1., 1, cfrp, 0., Ply-1
*Orientation, name=Ori-3, system=RECTANGULAR
Ori-3-DiscOrient
3, 0.
** Region: (CompositeLayup-3-1: Generated From Layup)
*Elset, elset=CompositeLayup-3-1, generate
 1048,  1300,     1
** Section: CompositeLayup-3-1
*Solid Section, elset=CompositeLayup-3-1, composite, orientation=Ori-3, stack direction=3, layup=CompositeLayup-3
1., 1, cfrp, 45., Ply-1
** Section: coat
*Solid Section, elset=Set-1, material=coat
,
** Section: al
*Solid Section, elset=Set-3, material=al
,
** Section: foam
*Solid Section, elset=Set-4, material=foam
,
*Orientation, name=Ori-5, system=RECTANGULAR
Ori-5-DiscOrient
3, 0.
** Region: (CompositeLayup-5-1: Generated From Layup)
*Elset, elset=CompositeLayup-5-1, generate
 6160,  6463,     1
** Section: CompositeLayup-5-1
*Solid Section, elset=CompositeLayup-5-1, composite, orientation=Ori-5, stack direction=3, layup=CompositeLayup-5
1., 1, cfrp, -45., Ply-1
*Orientation, name=Ori-2, system=RECTANGULAR
Ori-2-DiscOrient
3, 0.
** Region: (CompositeLayup-2-1: Generated From Layup)
*Elset, elset=CompositeLayup-2-1, generate
 6464,  7111,     1
** Section: CompositeLayup-2-1
*Solid Section, elset=CompositeLayup-2-1, composite, orientation=Ori-2, stack direction=3, layup=CompositeLayup-2
1., 1, cfrp, 0., Ply-1
** Section: honeycomb
*Solid Section, elset=Set-5, material=honeycomb
,
*End Part
**
**
** ASSEMBLY
**
*Assembly, name=Assembly
**
*Instance, name=Part-1-1, part=Part-1
*End Instance
**
*End Assembly
*Distribution Table, name=Ori-1-DiscOrient_Table
coord3D, coord3D
*Distribution Table, name=Ori-2-DiscOrient_Table
coord3D, coord3D
*Distribution Table, name=Ori-3-DiscOrient_Table
coord3D, coord3D
*Distribution Table, name=Ori-4-DiscOrient_Table
coord3D, coord3D
*Distribution Table, name=Ori-5-DiscOrient_Table
coord3D, coord3D
**
** MATERIALS
**
*Material, name=al
*Density
 5.6393,
*Elastic
 1.8864e+09, 0.33
*Material, name=cfrp
*Density
 3.10451,
*Elastic, type=ENGINEERING CONSTANTS
 2.8224e+09, 1.9296e+08, 1.9296e+08,      0.348,      0.348,        0.3, 1.3104e+08, 1.3104e+08
  7.422e+07,
*Material, name=coat
*Density
1.,
*Elastic
1., 0.3
*Material, name=foam
*Density
 0.146,
*Elastic, type=ENGINEERING CONSTANTS
 1.89e+06, 1.89e+06, 1.89e+06,    0.315,    0.315,      0.3,  593000.,  593000.
  593000.,
*Material, name=honeycomb
*Density
 0.0935,
*Elastic, type=ENGINEERING CONSTANTS
144000.,  144000., 2.88e+06,      0.3,     0.01,     0.01,  144000.,  835000.
  504000.,
