*Heading
** Job name: sg2_box_solid_section Model name: Model-1
** Generated by: Abaqus/CAE 2017
*Preprint, echo=NO, model=NO, history=NO, contact=NO
**
** PARTS
**
*Part, name=Part-1
*Node
      1,   21.1800003,   21.1800003
      2,          25.,          25.
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*Element, type=CPS4R
 1,  1,  2, 13, 28
 2, 28, 13, 14, 27
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*Nset, nset=Set-1
  1,  2,  3,  4,  5,  6
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*Elset, elset=Set-1
  1,  2,  3,  4,  5,  6
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*Nset, nset=Set-2
   1,   4,   6,   7,   8,   9
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*Elset, elset=Set-2
 19, 20, 21, 22, 23, 24
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*Nset, nset=Set-4
  2,  3,  5, 10, 13, 14
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*Elset, elset=Set-4
  1,  2,  3,  4,  5,  6
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*Distribution, name=Ori-1-DiscOrient, location=ELEMENT, Table=Ori-1-DiscOrient_Table
** Description: Distribution generated from Discrete Orientation
,           1.,           0.,           0.,           0.,           1.,           0.
1,           1.,           0.,           0.,           0.,           1.,           0.
2,           1.,           0.,           0.,           0.,           1.,           0.
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72,          -1.,           0.,           0.,           0.,          -1.,           0.
*Orientation, name=Ori-1, system=RECTANGULAR
Ori-1-DiscOrient
3, 0.
** Section: Section-3
*Solid Section, elset=Set-1, composite, orientation=Ori-1, layup=layer2
1., 1, Material-1, 45.
1., 1, Material-1, 45.
** Section: Section-2
*Solid Section, elset=Set-2, composite, orientation=Ori-1, layup=layer1
1., 1, Material-1, 0.
1., 1, Material-1, 0.
*End Part
**
**
** ASSEMBLY
**
*Assembly, name=Assembly
**
*Instance, name=Part-1-1, part=Part-1
*End Instance
**
*End Assembly
*Distribution Table, name=Ori-1-DiscOrient_Table
coord3D, coord3D
**
** MATERIALS
**
*Material, name=Material-1
*Density
1.,
*Elastic, type=ENGINEERING CONSTANTS
10.,  20.,  30., 0.12, 0.13, 0.23,  1.2,  1.3
  2.3,
