*Heading
** Job name: sg2_i_simple_eo2 Model name: Model-1
** Generated by: Abaqus/CAE 2023
*Preprint, echo=NO, model=NO, history=NO, contact=NO
**
** PARTS
**
*Part, name=Part-1
*Node
      1, -0.0126999998, -0.00584199978
      2, -0.0126999998, -0.00634999992
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*Element, type=CPS8R
 1,   1,   2,  19,  46, 147, 148, 149, 150
 2,  46,  19,  20,  45, 149, 151, 152, 153
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*Element, type=CPS6M
41, 117,  40,  39, 269, 171, 270
42, 112,  96,  97, 271, 272, 273
43, 107,  91,  90, 274, 247, 275
70, 140,  77,  76, 334, 232, 335
71, 135,  97,  96, 336, 272, 337
72, 130,  54,  53, 338, 186, 339
*Nset, nset=Set-1
   6,   7,   8,   9,  10,  56
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*Elset, elset=Set-1, generate
 21,  40,   1
*Nset, nset=Set-2
   1,   2,   3,   4,   5,  19
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*Elset, elset=Set-2, generate
  1,  20,   1
*Nset, nset=Set-3
   1,   4,   9,  10,  38,  39
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*Elset, elset=Set-3
  1,  2,  3,  4,  5,  6
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*Nset, nset=Set-5
   4,   5,   6,   9,  47,  48
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*Elset, elset=Set-5
 11, 12, 13, 14, 15, 16
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*Distribution, name=Ori-1-DiscOrient, location=ELEMENT, Table=Ori-1-DiscOrient_Table
** Description: Distribution generated from Discrete Orientation
,           1.,           0.,           0.,           0.,           1.,           0.
41,          -1.,           0.,           0.,           0.,          -1.,           0.
42,           0.,           1.,           0.,          -1.,           0.,           0.
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69,          -1.,           0.,           0.,           0.,          -1.,           0.
*Distribution, name=Ori-2-DiscOrient, location=ELEMENT, Table=Ori-2-DiscOrient_Table
** Description: Distribution generated from Discrete Orientation
,           1.,           0.,           0.,           0.,           1.,           0.
70,           1.,           0.,           0.,           0.,           1.,           0.
71,           0.,          -1.,           0.,           1.,           0.,           0.
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98,           1.,           0.,           0.,           0.,           1.,           0.
** Section: aluminum
*Solid Section, elset=Set-2, material=aluminum
,
** Section: aluminum
*Solid Section, elset=Set-1, material=aluminum
,
*Orientation, name=Ori-1, system=RECTANGULAR
Ori-1-DiscOrient
3, 0.
** Region: (CompositeLayup-1-1: Generated From Layup)
*Elset, elset=CompositeLayup-1-1, generate
 41,  69,   1
** Section: CompositeLayup-1-1
*Solid Section, elset=CompositeLayup-1-1, composite, orientation=Ori-1, stack direction=3, layup=CompositeLayup-1
1., 1, gfrp, 0., Ply-1
*Orientation, name=Ori-2, system=RECTANGULAR
Ori-2-DiscOrient
3, 0.
** Region: (CompositeLayup-2-1: Generated From Layup)
*Elset, elset=CompositeLayup-2-1, generate
 70,  98,   1
** Section: CompositeLayup-2-1
*Solid Section, elset=CompositeLayup-2-1, composite, orientation=Ori-2, stack direction=3, layup=CompositeLayup-2
1., 1, cfrp, 90., Ply-1
*End Part
**
**
** ASSEMBLY
**
*Assembly, name=Assembly
**
*Instance, name=Part-1-1, part=Part-1
*End Instance
**
*End Assembly
*Distribution Table, name=Ori-1-DiscOrient_Table
coord3D, coord3D
*Distribution Table, name=Ori-2-DiscOrient_Table
coord3D, coord3D
**
** MATERIALS
**
*Material, name=aluminum
*Density
2640.,
*Elastic
 7.1e+10, 0.33
*Material, name=cfrp
*Elastic, type=ENGINEERING CONSTANTS
 1.26e+11,   1.1e+10,   1.1e+10,      0.28,      0.28,       0.4,   6.6e+09,   6.6e+09
 3.929e+09,
*Material, name=gfrp
*Density
1903.,
*Elastic, type=LAMINA
 3.76e+10, 9.584e+09,      0.26, 4.081e+09, 4.081e+09, 4.081e+09
