*Heading
** Job name: rve_inclusion_cylinder_01 Model name: Model-1
** Generated by: Abaqus/CAE 2017
*Preprint, echo=NO, model=NO, history=NO, contact=NO
**
** PARTS
**
*Part, name=composite
*Node
      1, -0.0133974599, -0.223205075, -0.346410155
      2,  0.186602548,  0.123205081,  0.346410155
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*Element, type=C3D10
  1,  659,  163,  660,  661, 1488, 1487, 1486, 1490, 1489, 1491
  2,  158,  163,  159,  659, 1494, 1493, 1492, 1495, 1488, 1496
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*Nset, nset=Set-matrix
     1,     2,     3,     4,     5,     6
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*Elset, elset=Set-matrix, generate
  172,  6985,     1
*Nset, nset=Set-inclusion
    1,    2,   11,   12,   13,   14
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*Elset, elset=Set-inclusion, generate
   1,  171,    1
*Nset, nset=set-all-cells, generate
     1,  10554,      1
*Elset, elset=set-all-cells, generate
    1,  6985,     1
** Section: inclusion
*Solid Section, elset=Set-inclusion, material=inclusion
,
** Section: matrix
*Solid Section, elset=Set-matrix, material=matrix
,
*End Part
**
**
** ASSEMBLY
**
*Assembly, name=Assembly
**
*Instance, name=composite-1, part=composite
*End Instance
**
*End Assembly
**
** MATERIALS
**
*Material, name=inclusion
*Elastic
10.,0.
*Material, name=matrix
*Elastic
1., 0.3
