*Heading
** Job name: sg2_airfoil_2 Model name: Model-1
** Generated by: Abaqus/CAE 2017
*Preprint, echo=NO, model=NO, history=NO, contact=NO
**
** PARTS
**
*Part, name=Part-1
*Node
      1, 0.0345666073,  0.104599208
      2, 0.0593971014,    0.1041153
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*Element, type=CPS3
 1, 1553,  916,  119
 2,  118,  899, 1554
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*Element, type=CPS4R
 33,    7,  851,  943,  225
 34,  943,  851,    8,  224
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*Nset, nset=Set-1
  331,  332,  333,  334,  335,  336
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*Elset, elset=Set-1
 1988, 1989, 1991, 1992, 1993, 1994
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*Nset, nset=Set-3
  118,  119,  120,  121,  122,  123
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*Elset, elset=Set-3, generate
 3728,  4426,     1
*Nset, nset=Set-4
    1,    2,    3,    4,    5,    6
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*Elset, elset=Set-4, generate
 1005,  1985,     1
*Nset, nset=Set-5
  138,  139,  140,  141,  142,  143
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*Elset, elset=Set-5, generate
  579,  1004,     1
*Nset, nset=Set-6
   1,   2,   3,   4,   5,   6
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*Elset, elset=Set-6
    5,    8,   33,   34,   35,   36
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*Nset, nset=Set-8
  308,  309,  359,  372,  536,  537
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*Elset, elset=Set-8
 1997, 2020, 2047, 2064, 2065, 2066
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*Nset, nset=Set-10
  358,  359,  360,  361,  362,  363
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*Elset, elset=Set-10, generate
 2136,  3675,     1
*Distribution, name=Ori-2-DiscOrient, location=ELEMENT, Table=Ori-2-DiscOrient_Table
** Description: Distribution generated from Discrete Orientation
,           1.,           0.,           0.,           0.,           1.,           0.
1986, -0.871778666973114, 0.489899963140488,           0., -0.489899963140488, -0.871778666973114,           0.
1987, -0.632817685604095, -0.774300813674927,           0., 0.774300813674927, -0.632817685604095,           0.
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2135, -0.845433235168457, 0.534081161022186,           0., -0.534081161022186, -0.845433235168457,           0.
*Distribution, name=Ori-3-DiscOrient, location=ELEMENT, Table=Ori-3-DiscOrient_Table
** Description: Distribution generated from Discrete Orientation
,           1.,           0.,           0.,           0.,           1.,           0.
3676, 0.999478757381439, -0.0322834625840187,           0., 0.0322834625840187, 0.999478757381439,           0.
3677, -0.998960673809052, -0.0455800294876099,           0., 0.0455800294876099, -0.998960673809052,           0.
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3727,           0.,           1.,           0.,          -1.,           0.,           0.
*Distribution, name=Ori-4-DiscOrient, location=ELEMENT, Table=Ori-4-DiscOrient_Table
** Description: Distribution generated from Discrete Orientation
,           1.,           0.,           0.,           0.,           1.,           0.
1, 0.204879269003868, -0.978787243366241,           0., 0.978787243366241, 0.204879269003868,           0.
2, -0.207031026482582, -0.978334367275238,           0., 0.978334367275238, -0.207031026482582,           0.
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578, 0.098395399749279, 0.995147407054901,           0., -0.995147407054901, 0.098395399749279,           0.
*Orientation, name=Ori-4, system=RECTANGULAR
Ori-4-DiscOrient
3, 0.
** Region: (cfrp_le-1: Generated From Layup)
*Elset, elset=cfrp_le-1, generate
   1,  578,    1
** Section: cfrp_le-1
*Solid Section, elset=cfrp_le-1, composite, orientation=Ori-4, stack direction=3, layup=cfrp_le
1., 1, cfrp, 45., Ply-1
** Section: metal
*Solid Section, elset=Set-5, material=metal
,
** Section: foam
*Solid Section, elset=Set-4, material=foam
,
*Orientation, name=Ori-2, system=RECTANGULAR
Ori-2-DiscOrient
3, 0.
** Region: (cfrp-1: Generated From Layup)
*Elset, elset=cfrp-1, generate
 1986,  2135,     1
** Section: cfrp-1
*Solid Section, elset=cfrp-1, composite, orientation=Ori-2, stack direction=3, layup=cfrp
1., 1, cfrp, 0., Ply-1
*Distribution, name=Ori-1-DiscOrient, location=ELEMENT, Table=Ori-1-DiscOrient_Table
** Description: Distribution generated from Discrete Orientation
,           1.,           0.,           0.,           0.,           1.,           0.
2136,           1.,           0.,           0.,           0.,           1.,           0.
2137,           1.,           0.,           0.,           0.,           1.,           0.
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3675,           1.,           0.,           0.,           0.,           1.,           0.
*Orientation, name=Ori-1, system=RECTANGULAR
Ori-1-DiscOrient
3, 0.
** Section: honeycomb
*Solid Section, elset=Set-10, orientation=Ori-1, material=honeycomb
,
*Orientation, name=Ori-3, system=RECTANGULAR
Ori-3-DiscOrient
3, 0.
** Region: (cfrp_back-1: Generated From Layup)
*Elset, elset=cfrp_back-1, generate
 3676,  3727,     1
** Section: cfrp_back-1
*Solid Section, elset=cfrp_back-1, composite, orientation=Ori-3, stack direction=3, layup=cfrp_back
1., 1, cfrp, 60., Ply-1
** Section: skin
*Solid Section, elset=Set-3, material=skin
,
*End Part
**
**
** ASSEMBLY
**
*Assembly, name=Assembly
**
*Instance, name=Part-1-1, part=Part-1
*End Instance
**
*End Assembly
*Distribution Table, name=Ori-2-DiscOrient_Table
coord3D, coord3D
*Distribution Table, name=Ori-3-DiscOrient_Table
coord3D, coord3D
*Distribution Table, name=Ori-4-DiscOrient_Table
coord3D, coord3D
*Distribution Table, name=Ori-1-DiscOrient_Table
coord3D, coord3D
**
** MATERIALS
**
*Material, name=cfrp
*Density
1.,
*Elastic, type=ENGINEERING CONSTANTS
10.,  20.,  30., 0.12, 0.13, 0.23,  1.2,  1.3
  2.3,
*Material, name=foam
*Density
1.,
*Elastic
1.,0.
*Material, name=honeycomb
*Density
1.,
*Elastic, type=ENGINEERING CONSTANTS
10.,  20.,  30., 0.12, 0.13, 0.23,  1.2,  1.3
  2.3,
*Material, name=metal
*Density
1.,
*Elastic
1.,0.
*Material, name=skin
*Density
1.,
*Elastic
1.,0.
