*Heading
** Job name: sg2_iso_airfoil Model name: Model-1
** Generated by: Abaqus/CAE 2017
*Preprint, echo=NO, model=NO, history=NO, contact=NO
**
** PARTS
**
*Part, name=Part-1
*Node
      1,   4.67144966,  -10.2023315
      2,   6.09062433,  -9.70057678
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*Element, type=CPS3
 1, 885, 830, 712
 2, 841, 539, 774
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*Element, type=CPS4R
 25, 161, 508, 672, 952
 26, 690, 195, 964, 194
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*Nset, nset=Set-1, generate
   1,  995,    1
*Elset, elset=Set-1, generate
   1,  780,    1
** Section: Section-1
*Solid Section, elset=Set-1, material=Material-1
,
*End Part
**
**
** ASSEMBLY
**
*Assembly, name=Assembly
**
*Instance, name=Part-1-1, part=Part-1
*End Instance
**
*End Assembly
**
** MATERIALS
**
*Material, name=Material-1
*Density
 1.06868e-06,
*Elastic
206843., 0.49
