*Heading
** Job name: sg2_plydrop_composite_section Model name: Model-1
** Generated by: Abaqus/CAE 2017
*Preprint, echo=NO, model=NO, history=NO, contact=NO
**
** PARTS
**
*Part, name=Part-1
*Node
      1,  -5.30000019,           2.
      2,  -5.71421337,           3.
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*Element, type=CPS4R
1, 1, 2, 3, 4
 2,  5, 13, 46,  6
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*Nset, nset=Set-1
  7,  8, 47, 48, 49, 50
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*Elset, elset=Set-1, generate
 20,  67,   1
*Nset, nset=Set-3
   9,  10,  94,  95,  96,  97
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*Elset, elset=Set-3
  39,  40,  41,  42,  43,  44
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*Nset, nset=Set-5
  4,  5, 13, 14, 15, 16
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*Elset, elset=Set-5, generate
  2,  37,   1
*Nset, nset=Set-7
   1,   4,  11, 150, 151, 152
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*Elset, elset=Set-7
   1,  68,  69,  70,  71,  72
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*Distribution, name=Ori-1-DiscOrient, location=ELEMENT, Table=Ori-1-DiscOrient_Table
** Description: Distribution generated from Discrete Orientation
,           1.,           0.,           0.,           0.,           1.,           0.
20,           1.,           0.,           0.,           0.,           1.,           0.
21,           1.,           0.,           0.,           0.,           1.,           0.
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67,           1.,           0.,           0.,           0.,           1.,           0.
*Distribution, name=Ori-2-DiscOrient, location=ELEMENT, Table=Ori-2-DiscOrient_Table
** Description: Distribution generated from Discrete Orientation
,           1.,           0.,           0.,           0.,           1.,           0.
97,           1.,           0.,           0.,           0.,           1.,           0.
98,           1.,           0.,           0.,           0.,           1.,           0.
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125,           1.,           0.,           0.,           0.,           1.,           0.
*Distribution, name=Ori-3-DiscOrient, location=ELEMENT, Table=Ori-3-DiscOrient_Table
** Description: Distribution generated from Discrete Orientation
,           1.,           0.,           0.,           0.,           1.,           0.
2,           1.,           0.,           0.,           0.,           1.,           0.
3,           1.,           0.,           0.,           0.,           1.,           0.
4,           1.,           0.,           0.,           0.,           1.,           0.
5,           1.,           0.,           0.,           0.,           1.,           0.
6,           1.,           0.,           0.,           0.,           1.,           0.
7,           1.,           0.,           0.,           0.,           1.,           0.
8,           1.,           0.,           0.,           0.,           1.,           0.
9,           1.,           0.,           0.,           0.,           1.,           0.
10,           1.,           0.,           0.,           0.,           1.,           0.
11,           1.,           0.,           0.,           0.,           1.,           0.
12,           1.,           0.,           0.,           0.,           1.,           0.
13,           1.,           0.,           0.,           0.,           1.,           0.
14,           1.,           0.,           0.,           0.,           1.,           0.
15,           1.,           0.,           0.,           0.,           1.,           0.
16,           1.,           0.,           0.,           0.,           1.,           0.
17,           1.,           0.,           0.,           0.,           1.,           0.
18,           1.,           0.,           0.,           0.,           1.,           0.
19,           1.,           0.,           0.,           0.,           1.,           0.
*Distribution, name=Ori-4-DiscOrient, location=ELEMENT, Table=Ori-4-DiscOrient_Table
** Description: Distribution generated from Discrete Orientation
,           1.,           0.,           0.,           0.,           1.,           0.
1, 0.70710676908493, 0.70710676908493,           0., -0.70710676908493, 0.70710676908493,           0.
68,           1.,           0.,           0.,           0.,           1.,           0.
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96,           1.,           0.,           0.,           0.,           1.,           0.
*Orientation, name=Ori-4, system=RECTANGULAR
Ori-4-DiscOrient
3, 0.
** Region: (CompositeLayup-4-1: Generated From Layup)
*Elset, elset=CompositeLayup-4-1
  1, 68, 69, 70, 71, 72
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** Section: CompositeLayup-4-1
*Solid Section, elset=CompositeLayup-4-1, composite, orientation=Ori-4, stack direction=3, layup=CompositeLayup-4
1., 1, Material-1, 60., Ply-1
*Orientation, name=Ori-3, system=RECTANGULAR
Ori-3-DiscOrient
3, 0.
** Region: (CompositeLayup-3-1: Generated From Layup)
*Elset, elset=CompositeLayup-3-1, generate
  2,  19,   1
** Section: CompositeLayup-3-1
*Solid Section, elset=CompositeLayup-3-1, composite, orientation=Ori-3, stack direction=3, layup=CompositeLayup-3
1., 1, Material-1, 60., Ply-1
*Orientation, name=Ori-1, system=RECTANGULAR
Ori-1-DiscOrient
3, 0.
** Region: (CompositeLayup-1-1: Generated From Layup)
*Elset, elset=CompositeLayup-1-1, generate
 20,  67,   1
** Section: CompositeLayup-1-1
*Solid Section, elset=CompositeLayup-1-1, composite, orientation=Ori-1, stack direction=3, layup=CompositeLayup-1
1., 1, Material-1, 0., Ply-1
*Orientation, name=Ori-2, system=RECTANGULAR
Ori-2-DiscOrient
3, 0.
** Region: (CompositeLayup-2-1: Generated From Layup)
*Elset, elset=CompositeLayup-2-1, generate
  97,  125,    1
** Section: CompositeLayup-2-1
*Solid Section, elset=CompositeLayup-2-1, composite, orientation=Ori-2, stack direction=3, layup=CompositeLayup-2
1., 1, Material-1, 30., Ply-1
*End Part
**
**
** ASSEMBLY
**
*Assembly, name=Assembly
**
*Instance, name=Part-1-1, part=Part-1
*End Instance
**
*End Assembly
*Distribution Table, name=Ori-1-DiscOrient_Table
coord3D, coord3D
*Distribution Table, name=Ori-2-DiscOrient_Table
coord3D, coord3D
*Distribution Table, name=Ori-3-DiscOrient_Table
coord3D, coord3D
*Distribution Table, name=Ori-4-DiscOrient_Table
coord3D, coord3D
**
** MATERIALS
**
*Material, name=Material-1
*Density
1.,
*Elastic, type=ENGINEERING CONSTANTS
10.,  20.,  30., 0.12, 0.13, 0.23,  1.2,  1.3
  2.3,
