*Heading
** Job name: rve_inclusion Model name: Model-1
** Generated by: Abaqus/CAE 2017
*Preprint, echo=NO, model=NO, history=NO, contact=NO
**
** PARTS
**
*Part, name=composite
*Node
      1, -0.103065059,  -7.8647544e-10,           0.
      2,           0.,           0., -0.183532581
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*Element, type=C3D10
   1, 1001, 1002, 1003, 1004, 2000, 1999, 1998, 2002, 2001, 2003
   2, 1005, 1006, 1007, 1008, 2006, 2005, 2004, 2008, 2007, 2009
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*Nset, nset=Set-matrix
     1,     2,     3,     4,     5,     6
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*Elset, elset=Set-matrix
    1,    2,    3,    4,    5,    6
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*Nset, nset=Set-inclusion
     1,     2,     3,     4,     5,    13
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*Elset, elset=Set-inclusion
 3565, 3566, 3567, 3568, 3569, 3570
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*Nset, nset=set-all-cells, generate
     1,  14516,      1
*Elset, elset=set-all-cells, generate
    1,  9843,     1
** Section: matrix
*Solid Section, elset=Set-matrix, material=matrix
,
** Section: inclusion
*Solid Section, elset=Set-inclusion, material=inclusion
,
*End Part
**
**
** ASSEMBLY
**
*Assembly, name=Assembly
**
*Instance, name=composite-1, part=composite
*End Instance
**
*End Assembly
**
** MATERIALS
**
*Material, name=inclusion
*Elastic
10.,0.
*Material, name=matrix
*Elastic
1., 0.3
