*Heading
** Job name: sg2_sandwich Model name: Model-1
** Generated by: Abaqus/CAE 2025
*Preprint, echo=NO, model=NO, history=NO, contact=NO
**
** PARTS
**
*Part, name=Part-1
*Node
      1,         -10.,          15.
      2,  -7.59629917,          15.
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*Element, type=CPS4R
 1,   1,   2, 138,  45
 2,   2,  26, 139, 138
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*Nset, nset=Set-1
   1,   2,   3,   4,   5,   6
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*Elset, elset=Set-1
   1,   2,   3,   4,   5,   6
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*Nset, nset=Set-2
   1,   2,   3,   4,   7,   8
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*Elset, elset=Set-2
  31,  32,  33,  34,  35,  36
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*Nset, nset=Set-3
  5,  6, 35, 36, 37, 38, 39, 40, 41, 42, 43
*Elset, elset=Set-3, generate
 21,  30,   1
*Nset, nset=Set-5
  21,  22, 102, 103, 104, 105, 106, 107, 108, 109, 110
*Elset, elset=Set-5, generate
  78,  105,    3
*Distribution, name=Ori-1-DiscOrient, location=ELEMENT, Table=Ori-1-DiscOrient_Table
** Description: Distribution generated from Discrete Orientation
,           1.,           0.,           0.,           0.,           1.,           0.
1,           1.,           0.,           0.,           0.,           1.,           0.
2,           1.,           0.,           0.,           0.,           1.,           0.
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30,           1.,           0.,           0.,           0.,           1.,           0.
*Orientation, name=Ori-1, system=RECTANGULAR
Ori-1-DiscOrient
3, 0.
** Region: (comp:Set-1), (Material Orientation:Picked)
*Elset, elset=_I1, internal, generate
  1,  30,   1
** Section: comp
*Solid Section, elset=_I1, orientation=Ori-1, material=comp
,
** Section: alum
*Solid Section, elset=Set-2, material=alum
,
*Distribution, name=Ori-2-DiscOrient, location=ELEMENT, Table=Ori-2-DiscOrient_Table
** Description: Distribution generated from Discrete Orientation
,           1.,           0.,           0.,           0.,           1.,           0.
76,          -1.,           0.,           0.,           0.,          -1.,           0.
77,          -1.,           0.,           0.,           0.,          -1.,           0.
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105,          -1.,           0.,           0.,           0.,          -1.,           0.
*Orientation, name=Ori-2, system=RECTANGULAR
Ori-2-DiscOrient
3, 0.
** Region: (comp:Set-1), (Material Orientation:Picked)
*Elset, elset=_I3, internal, generate
  76,  105,    1
** Section: comp
*Solid Section, elset=_I3, orientation=Ori-2, material=comp
,
*End Part
**
**
** ASSEMBLY
**
*Assembly, name=Assembly
**
*Instance, name=Part-1-1, part=Part-1
*End Instance
**
*End Assembly
*Distribution Table, name=Ori-1-DiscOrient_Table
coord3D, coord3D
*Distribution Table, name=Ori-2-DiscOrient_Table
coord3D, coord3D
**
** MATERIALS
**
*Material, name=alum
*Density
1.,
*Elastic
50., 0.3
*Material, name=comp
*Density
1.,
*Elastic, type=ENGINEERING CONSTANTS
1000.,100.,100., 0.3, 0.3, 0.4, 20., 20.
 10.,
