*Heading
** Job name: sg2d-user-lam Model name: sg2d-user-lam
** Generated by: Abaqus/CAE 2023
*Preprint, echo=NO, model=NO, history=NO, contact=NO
**
** PARTS
**
*Part, name=Part-1
*Node
      1,           0.,          70.,          38.
      2,           0.,   -31.025816,          38.
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*Element, type=S4R
  1,    1,   37, 1937,  233
  2,   37,   38, 1938, 1937
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*Element, type=S3
2946, 4527, 4457, 4233
2947, 4503, 4267, 4266
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*Nset, nset=mat2_0d0/23
    4,    5,   12,   13,  145,  146
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*Elset, elset=mat2_0d0/23, generate
 1009,  1416,     1
*Nset, nset=mat1_0d0/9
   19,   22,   33,   35,   36,  966
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*Elset, elset=mat1_0d0/9, generate
 5860,  6310,     1
*Nset, nset=mat2_90d0/27
   23,   24,   26,   27,   30, 1037
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*Elset, elset=mat2_90d0/27, generate
 6311,  6753,     1
*Nset, nset=mat2_90d0/10
   31,   32,   33,   34,   35, 1599
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*Elset, elset=mat2_90d0/10, generate
 5417,  5859,     1
*Nset, nset=mat1_45d0/25
    6,    7,   14,   17,  153,  154
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*Elset, elset=mat1_45d0/25, generate
 2674,  2945,     1
*Nset, nset=mat1_45d0/21
    3,    9,   10,   11,  138,  139
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*Elset, elset=mat1_45d0/21, generate
 397,  736,    1
*Nset, nset=mat2_45d0/28
    1,    2,   23,   24,   25,   37
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*Elset, elset=mat2_45d0/28, generate
 2946,  3366,     1
*Nset, nset=mat2_45d0/11
   15,   16,   29,   32,   34,  584
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*Elset, elset=mat2_45d0/11, generate
 4994,  5416,     1
*Nset, nset=mat1_0d0/26
   20,   21,   26,   27,   28,  865
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*Elset, elset=mat1_0d0/26, generate
 3367,  3817,     1
*Nset, nset=mat1_-45d0/29
    1,    2,    3,    4,    5,    6
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*Elset, elset=mat1_-45d0/29, generate
   1,  396,    1
*Nset, nset=mat1_-45d0/12
   10,   11,   12,   13,   14,   15
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*Elset, elset=mat1_-45d0/12, generate
 1689,  2183,     1
*Nset, nset=mat1_-45d0/24
    5,    6,   13,   14,  150,  151
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*Elset, elset=mat1_-45d0/24, generate
 1417,  1688,     1
*Nset, nset=mat1_-45d0/22
    3,    4,   10,   12,  142,  143
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*Elset, elset=mat1_-45d0/22, generate
  737,  1008,     1
*Nset, nset=mat2_0d0/30
   19,   20,   21,   22,  768,  769
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*Elset, elset=mat2_0d0/30, generate
 2184,  2673,     1
*Nset, nset=mat1_90d0/31
   19,   20,   26,   30,   31,   33
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*Elset, elset=mat1_90d0/31, generate
 4551,  4993,     1
*Nset, nset=mat1_-45d0/32
   24,   25,   29,   30,   31,   32
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*Elset, elset=mat1_-45d0/32, generate
 4159,  4550,     1
*Nset, nset=mat2_45d0/33
    2,    8,   15,   18,   25,   29
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*Elset, elset=mat2_45d0/33, generate
 3818,  4158,     1
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*Distribution, name=Ori-1-DiscOrient, location=ELEMENT, Table=Ori-1-DiscOrient_Table
** Description: Distribution generated from Discrete Orientation
,           1.,           0.,           0.,           0.,           1.,           0.
1,           0.,           1.,           0.,           0.,           0.,           1.
2,           0.,           1.,           0.,           0.,           0.,           1.
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6753,           0.,           1.,           0.,           0.,           0.,           1.
*Orientation, name=Ori-1, system=RECTANGULAR
Ori-1-DiscOrient
3, 0.
** Section: mat1_-45.0
*Shell Section, elset=mat1_-45d0/29, material=mat1, orientation=Ori-1
1., 5
*Distribution, name=Ori-4-DiscOrient, location=ELEMENT, Table=Ori-4-DiscOrient_Table
** Description: Distribution generated from Discrete Orientation
,           1.,           0.,           0.,           0.,           1.,           0.
397,           0.,           0.,          -1.,           0.,           1.,           0.
398,           0.,           0.,          -1.,           0.,           1.,           0.
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2945,           0.,           0.,          -1.,           0.,           1.,           0.
*Orientation, name=Ori-4, system=RECTANGULAR
Ori-4-DiscOrient
3, 0.
** Section: mat1_45.0
*Shell Section, elset=mat1_45d0/21, material=mat1, orientation=Ori-4
1., 5
** Section: mat1_-45.0
*Shell Section, elset=mat1_-45d0/22, material=mat1, orientation=Ori-4
1., 5
** Section: mat2_0.0
*Shell Section, elset=mat2_0d0/23, material=mat2, orientation=Ori-4
1., 5
** Section: mat1_-45.0
*Shell Section, elset=mat1_-45d0/24, material=mat1, orientation=Ori-4
1., 5
*Distribution, name=Ori-3-DiscOrient, location=ELEMENT, Table=Ori-3-DiscOrient_Table
** Description: Distribution generated from Discrete Orientation
,           1.,           0.,           0.,           0.,           1.,           0.
1689,           0.,          -1.,           0.,           0.,           0.,          -1.
1690,           0.,          -1.,           0.,           0.,           0.,          -1.
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6310,           0.,          -1.,           0.,           0.,           0.,          -1.
*Orientation, name=Ori-3, system=RECTANGULAR
Ori-3-DiscOrient
3, 0.
** Section: mat1_-45.0
*Shell Section, elset=mat1_-45d0/12, material=mat1, orientation=Ori-3
1., 5
*Distribution, name=Ori-2-DiscOrient, location=ELEMENT, Table=Ori-2-DiscOrient_Table
** Description: Distribution generated from Discrete Orientation
,           1.,           0.,           0.,           0.,           1.,           0.
3818,           0., 0.278854221105576, 0.960333466529846,           0., -0.960333466529846, 0.278854221105576
3819,           0., -0.278854191303253, 0.960333466529846,           0., -0.960333466529846, -0.278854191303253
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2673,           0., 0.28728374838829, 0.957845509052277,           0., -0.957845509052277, 0.28728374838829
*Orientation, name=Ori-2, system=RECTANGULAR
Ori-2-DiscOrient
3, 0.
** Section: mat2_0.0
*Shell Section, elset=mat2_0d0/30, material=mat2, orientation=Ori-2
1., 5
** Section: mat1_45.0
*Shell Section, elset=mat1_45d0/25, material=mat1, orientation=Ori-4
1., 5
** Section: mat2_45.0
*Shell Section, elset=mat2_45d0/28, material=mat2, orientation=Ori-1
1., 5
** Section: mat1_0.0
*Shell Section, elset=mat1_0d0/26, material=mat1, orientation=Ori-1
1., 5
** Section: mat2_45.0
*Shell Section, elset=mat2_45d0/33, material=mat2, orientation=Ori-2
1., 5
** Section: mat1_-45.0
*Shell Section, elset=mat1_-45d0/32, material=mat1, orientation=Ori-2
1., 5
** Section: mat1_90.0
*Shell Section, elset=mat1_90d0/31, material=mat1, orientation=Ori-2
1., 5
** Section: mat2_45.0
*Shell Section, elset=mat2_45d0/11, material=mat2, orientation=Ori-3
1., 5
** Section: mat2_90.0
*Shell Section, elset=mat2_90d0/10, material=mat2, orientation=Ori-3
1., 5
** Section: mat1_0.0
*Shell Section, elset=mat1_0d0/9, material=mat1, orientation=Ori-3
1., 5
** Section: mat2_90.0
*Shell Section, elset=mat2_90d0/27, material=mat2, orientation=Ori-1
1., 5
*End Part
**
**
** ASSEMBLY
**
*Assembly, name=Assembly
**
*Instance, name=Part-1-1, part=Part-1
*End Instance
**
*End Assembly
*Distribution Table, name=Ori-1-DiscOrient_Table
coord3D, coord3D
*Distribution Table, name=Ori-4-DiscOrient_Table
coord3D, coord3D
*Distribution Table, name=Ori-3-DiscOrient_Table
coord3D, coord3D
*Distribution Table, name=Ori-2-DiscOrient_Table
coord3D, coord3D
**
** MATERIALS
**
*Material, name=mat1
*Elastic
 1e+11, 0.1
*Material, name=mat2
*Elastic
 1e+09, 0.4
