*Heading
** Job name: Job-1 Model name: Model-1
** Generated by: Abaqus/CAE 2023
*Preprint, echo=NO, model=NO, history=NO, contact=NO
**
** PARTS
**
*Part, name=Part-1
*Node
      1,           0.,         -0.5,         -0.5
      2,           0., -0.449999988,         -0.5
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*Element, type=C3D20R
  1,   43,   44,   65,   64,    1,    2,   23,   22,  886,  885,  884,  883,  887,  888,  889,
      890,  892,  891,  893,  894
  2,   44,   45,   66,   65,    2,    3,   24,   23,  897,  896,  895,  885,  898,  899,  900,
      888,  891,  901,  902,  893
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*Nset, nset=_PickedSet5, internal, generate
    1,  3003,     1
*Elset, elset=_PickedSet5, internal, generate
   1,  400,    1
*Orientation, name=Ori-1
1., 0., 0., 0., 1., 0.
3, 45.
** Section: Section-2
*Solid Section, elset=_PickedSet5, orientation=Ori-1, material=Material-2
,
*End Part
**
**
** ASSEMBLY
**
*Assembly, name=Assembly
**
*Instance, name=Part-1-1, part=Part-1
*End Instance
**
*End Assembly
**
** MATERIALS
**
*Material, name=Material-1
*Density
1000.,
*Elastic
 1e+09, 0.3
*Material, name=Material-2
*Density
1000.,
*Elastic, type=ENGINEERING CONSTANTS
 1e+11, 1e+10, 1e+10,   0.3,   0.3,   0.1, 5e+09, 5e+09
 2e+09,
** ----------------------------------------------------------------
**
** STEP: Step-1
**
*Step, name=Step-1, nlgeom=NO
*Static
1., 1., 1e-05, 1.
**
** OUTPUT REQUESTS
**
*Restart, write, frequency=0
**
** FIELD OUTPUT: F-Output-1
**
*Output, field, variable=PRESELECT
**
** HISTORY OUTPUT: H-Output-1
**
*Output, history, variable=PRESELECT
*End Step
