*Heading
** Job name: sg31_rec_ori_discrete Model name: sg31_rec
** Generated by: Abaqus/CAE 2023
*Preprint, echo=NO, model=NO, history=NO, contact=NO
**
** PARTS
**
*Part, name=PART-1
*Node
      1,           0.,         -0.5,         -0.5
      2,           0., -0.449999988,         -0.5
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*Element, type=C3D20R
  1,   43,   44,   65,   64,    1,    2,   23,   22,  886,  885,  884,  883,  887,  888,  889,
      890,  892,  891,  893,  894
  2,   44,   45,   66,   65,    2,    3,   24,   23,  897,  896,  895,  885,  898,  899,  900,
      888,  891,  901,  902,  893
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*Nset, nset=_PICKEDSET5, internal, generate
    1,  3003,     1
*Elset, elset=_PICKEDSET5, internal, generate
   1,  400,    1
*Distribution, name=Ori-1-DiscOrient, location=ELEMENT, Table=Ori-1-DiscOrient_Table
** Description: Distribution generated from Discrete Orientation
,           1.,           0.,           0.,           0.,           1.,           0.
1,           1.,           0.,           0.,           0.,           1.,           0.
2,           1.,           0.,           0.,           0.,           1.,           0.
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400,           1.,           0.,           0.,           0.,           1.,           0.
*Orientation, name=Ori-1, system=RECTANGULAR
Ori-1-DiscOrient
3, 45.
** Section: Section-1-_PICKEDSET5
*Solid Section, elset=_PICKEDSET5, orientation=Ori-1, material=MATERIAL-2
,
*End Part
**
**
** ASSEMBLY
**
*Assembly, name=Assembly
**
*Instance, name=PART-1-1, part=PART-1
*End Instance
**
*End Assembly
*Distribution Table, name=Ori-1-DiscOrient_Table
coord3D, coord3D
**
** MATERIALS
**
*Material, name=MATERIAL-1
*Density
1000.,
*Elastic
 1e+09, 0.3
*Material, name=MATERIAL-2
*Density
1000.,
*Elastic, type=ENGINEERING CONSTANTS
 1e+11, 1e+10, 1e+10,   0.3,   0.3,   0.1, 5e+09, 5e+09
 2e+09,
** ----------------------------------------------------------------
**
** STEP: Step-1
**
*Step, name=Step-1, nlgeom=NO
*Static
1., 1., 1e-05, 1.
**
** OUTPUT REQUESTS
**
*Restart, write, frequency=0
**
** FIELD OUTPUT: F-Output-1
**
*Output, field, variable=PRESELECT
**
** HISTORY OUTPUT: H-Output-1
**
*Output, history, variable=PRESELECT
*End Step
