*Heading
** Job name: ud_fiber_3d Model name: UDFiberRVE
** Generated by: Abaqus/CAE 2025
*Preprint, echo=NO, model=NO, history=NO, contact=NO
**
** PARTS
**
*Part, name=RVE
*Node
      1,         0.75,          0.5,           1.
      2,         0.75,          0.5,           0.
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*Element, type=C3D8R
  1, 1344,  291,  290, 1346,  194,   26,   25,  196
  2, 1346,  290,  289, 1347,  196,   25,   24,  197
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*Nset, nset=FIBRE
    1,    2,   11,   12,   13,   14
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*Elset, elset=FIBRE, generate
   1,  650,    1
*Nset, nset=MATRIX
    1,    2,    3,    4,    5,    6
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*Elset, elset=MATRIX, generate
  651,  2756,     1
*Orientation, name=Ori-1
1., 0., 0., 0., 1., 0.
3, 0.
** Section: Fibre_Section
*Solid Section, elset=FIBRE, orientation=Ori-1, material=Fibre_Mat
,
** Section: Matrix_Section
*Solid Section, elset=MATRIX, material=Matrix_Mat
,
*End Part
**
**
** ASSEMBLY
**
*Assembly, name=Assembly
**
*Instance, name=RVE-1, part=RVE
*End Instance
**
*End Assembly
**
** MATERIALS
**
*Material, name=Fibre_Mat
*Elastic, type=ENGINEERING CONSTANTS
 1.5e+10, 1.5e+10, 2.3e+11,     0.2,     0.2,    0.25, 1.5e+10, 1.5e+10
   2e+10,
*Material, name=Matrix_Mat
*Elastic
 3.5e+09, 0.35
