*Heading
** Job name: box_cus_comp Model name: Model-2
** Generated by: Abaqus/CAE 2023
*Preprint, echo=NO, model=NO, history=NO, contact=NO
**
** PARTS
**
*Part, name=Part-1
*Node
      1,  0.476500005, -0.264999986
      2,  0.446500003, -0.234999999
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*Element, type=WARP2D4
  1,    1,    9,  621,  216
  2,    9,   10,  622,  621
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*Nset, nset=Set-1, generate
    1,  2100,     1
*Elset, elset=Set-1, generate
    1,  1800,     1
*Nset, nset=Set-2
   1,   4,   5,   8, 118, 119
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*Elset, elset=Set-2
    1,    7,   13,   19,   25,   31
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*Nset, nset=Set-10
   1,   4,   5,   8, 118, 119
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*Elset, elset=Set-10
    1,    7,   13,   19,   25,   31
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*Distribution, name=Ori-1-DiscOrient, location=ELEMENT, Table=Ori-1-DiscOrient_Table
** Description: Distribution generated from Discrete Orientation
,           1.,           0.,           0.,           0.,           1.,           0.
1,          -1.,           0.,           0.,           0.,          -1.,           0.
2,          -1.,           0.,           0.,           0.,          -1.,           0.
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1800,           1.,           0.,           0.,           0.,           1.,           0.
*Orientation, name=Ori-1, system=RECTANGULAR
Ori-1-DiscOrient
2, 15.
** Region: (CompositeLayup-1-1: Generated From Layup)
*Elset, elset=CompositeLayup-1-1, generate
    1,  1800,     1
** Section: CompositeLayup-1-1
*Solid Section, elset=CompositeLayup-1-1, composite, orientation=Ori-1, stack direction=3, layup=CompositeLayup-1
1., 1, Material-1, 15., Ply-1
*End Part
**
**
** ASSEMBLY
**
*Assembly, name=Assembly
**
*Instance, name=Part-1-1, part=Part-1
*End Instance
**
*End Assembly
*Distribution Table, name=Ori-1-DiscOrient_Table
coord3D, coord3D
**
** MATERIALS
**
*Material, name=Material-1
*Elastic, type=ENGINEERING CONSTANTS
 2.059e+07, 1.42e+06, 1.42e+06,      0.3,      0.3,     0.34,  870000.,  870000.
  696000.,
** ----------------------------------------------------------------
**
** STEP: Step-1
**
*Step, name=Step-1, nlgeom=NO
*Static
1., 1., 1e-05, 1.
**
** OUTPUT REQUESTS
**
*Restart, write, frequency=0
**
** FIELD OUTPUT: F-Output-1
**
*Output, field, variable=PRESELECT
**
** HISTORY OUTPUT: H-Output-1
**
*Output, history, variable=PRESELECT
*End Step
