*Heading
** Job name: plate400 Model name: Model-1
** Generated by: Abaqus/CAE 2017
*Preprint, echo=NO, model=NO, history=NO, contact=NO
**
** PARTS
**
*Part, name=Part-1
*Node
      1,         200.,         200.,           0.
      2,         180.,         200.,           0.
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*Element, type=S4R
  1,    1,    2,   23,   22
  2,    2,    3,   24,   23
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**Include, input=shellsections.inp
*End Part
**
**
** ASSEMBLY
**
*Assembly, name=Assembly
**
*Instance, name=Part-1-1, part=Part-1
*End Instance
**
*Nset, nset=Set-1, instance=Part-1-1
   21,   42,   63,   84,  105,  126
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*Elset, elset=Set-1, instance=Part-1-1, generate
  20,  400,   20
*Nset, nset=center, instance=Part-1-1
 221,
*Elset, elset=_Surf-1_E4, internal, instance=Part-1-1, generate
   1,  381,   20
*Surface, type=ELEMENT, name=Surf-1
_Surf-1_E4, E4
*End Assembly
** ----------------------------------------------------------------
**
** STEP: Step-1
**
*Step, name=Step-1, nlgeom=NO
*Static
1., 1., 1e-05, 1.
**
** BOUNDARY CONDITIONS
**
** Name: BC-1 Type: Displacement/Rotation
*Boundary
Set-1, 1, 1
Set-1, 2, 2
Set-1, 3, 3
Set-1, 4, 4
Set-1, 5, 5
Set-1, 6, 6
**
** LOADS
**
** Name: Load-1   Type: Shell edge load
*Dsload, constant resultant=YES
Surf-1, EDNOR, -1.
**
** OUTPUT REQUESTS
**
*Restart, write, frequency=0
**
** FIELD OUTPUT: F-Output-1
**
*Output, field, frequency=99999
*Node Output, nset=center
U,
**
** HISTORY OUTPUT: H-Output-1
**
*Output, history, variable=PRESELECT
*End Step
